*HEADING
MyCAE CalculiX input deck: test1_Simulation_Case
** Nodes: 111, tetra4 elements: 264, surface triangles: 212
*NODE
1, 0, 0, 0
2, 0, 0, 20
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*NSET, NSET=NALL
1, 2, 3, 4, 5, 6
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*ELEMENT, TYPE=C3D4, ELSET=EALL
277, 90, 85, 61, 73
278, 73, 61, 67, 85
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*MATERIAL, NAME=Steel
*ELASTIC
210000000000, 0.3
*DENSITY
7800
*SOLID SECTION, ELSET=EALL, MATERIAL=Steel
*NSET, NSET=N_fixedend
3, 4, 7, 8, 11, 15
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*NSET, NSET=N_loadendbc
1, 2, 5, 6, 9, 13
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*ELSET, ELSET=E_fixedend
329, 332, 333, 336, 338, 344
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*ELSET, ELSET=E_loadendbc
331, 335, 339, 343, 348, 349
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*SURFACE, NAME=S_fixedend, TYPE=ELEMENT
520, S1
529, S4
506, S2
515, S1
509, S2
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498, S1
*SURFACE, NAME=S_loadendbc, TYPE=ELEMENT
503, S1
517, S1
523, S1
530, S4
502, S3
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490, S1
*BOUNDARY
N_fixedend, 1, 3, 0.0
*STEP
*STATIC
*DLOAD
S_loadendbc, P, 100000
*NODE PRINT, NSET=NALL
U
*EL PRINT, ELSET=EALL
S
*END STEP
